*NODE, NSET = DELNODES
1,  -6.33286,  1.43994,  1.70266
2,  -6.6585,  1.23608,  2.30916
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*ELEMENT, TYPE = C3D8,ELSET = DELELEMENTS
1,  1,  2,  9,  8,  57,  58,  65,  64
2,  2,  3,  10,  9,  58,  59,  66,  65
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*NSET,NSET = BNODES
1
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*NSET, NSET = FNODES
992
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**
*SOLID SECTION, ELSET=DELELEMENTS, MATERIAL=BONE
*MATERIAL, NAME = BONE
*ELASTIC
1E09,0.3
**
**BOUNDARY CONDITIONS
*STEP, NLGEOM = YES, UNSYMM=YES, INC = 1000
*STATIC
1.0,1.0
*BOUNDARY, TYPE=VELOCITY, OP=NEW
BNODES,1,3,0.0
*CLOAD, OP=NEW
FNODES,1,0.0
FNODES,2,0.0
FNODES,3,-100
*END STEP
